  Left = {
    AnyFolder Arm = {

    AnyFolder SCProtraction= {

      // Change the following variables to adjust the moment arm study
      AnyVector RangeOfMotion = DesignVar({-30,-0});
      AnyVar SCElevation = DesignVar(11.5);
      AnyVar GHAbduction = DesignVar(0);
      AnyVar GHFlexion = DesignVar(0);
      AnyVar GHExternalRotation = DesignVar(0);
      AnyVar ElbowFlexion = DesignVar(0);
      AnyVar ElbowPronation = DesignVar(0);
      AnyVar WristFlexion = DesignVar(0);
      AnyVar WristAbduction = DesignVar(0);
      /////////////////////////////////////////

      AnyFloat Mask = {1,0,0,0,0,0,0,0,0};
      AnyVector DriverPos = {
        RangeOfMotion[0], SCElevation, GHAbduction, GHFlexion,
        GHExternalRotation ,ElbowFlexion, ElbowPronation,
        WristFlexion ,WristAbduction }*pi/180;
      AnyString OutputFileName =  "MomentArms_Arm_Left_SCProtraction";


      // The following should not be changed
      AnyFolder &SideBodyModelRef=....BodyModel.Left;
      AnyFolder &SideBodyInterfaceRef = ....BodyModel.Interface.Left;
      AnyFolder &SideTrunkMusRef = ....BodyModel.Trunk.MusclesSpineLeft;
      #include "EvaluateMomentArmsStudy.any"

    };

    AnyFolder SCElevation= {

      // Change the following variables to adjust the moment arm study
      AnyVector RangeOfMotion = DesignVar({-20,20});
      AnyVar SCProtraction = DesignVar(-23);
      AnyVar GHAbduction = DesignVar(0);
      AnyVar GHFlexion = DesignVar(0);
      AnyVar GHExternalRotation = DesignVar(0);
      AnyVar ElbowFlexion = DesignVar(0);
      AnyVar ElbowPronation = DesignVar(0);
      AnyVar WristFlexion = DesignVar(0);
      AnyVar WristAbduction = DesignVar(0);
      /////////////////////////////////////////

      AnyFloat Mask = {0,1,0,0,0,0,0,0,0};
      AnyVector DriverPos = {
        SCProtraction, RangeOfMotion[0], GHAbduction, GHFlexion,
        GHExternalRotation ,ElbowFlexion, ElbowPronation,
        WristFlexion ,WristAbduction }*pi/180;
      AnyString OutputFileName =  "MomentArms_Arm_Left_SCElevation";

      // The following should not be changed
      AnyFolder &SideBodyModelRef=....BodyModel.Left;
      AnyFolder &SideBodyInterfaceRef = ....BodyModel.Interface.Left;
      AnyFolder &SideTrunkMusRef = ....BodyModel.Trunk.MusclesSpineLeft;
      #include "EvaluateMomentArmsStudy.any"

    };


    AnyFolder GHAbduction = {

      // Change the following variables to adjust the moment arm study
      AnyVector RangeOfMotion = DesignVar({-10,90});
      AnyVar SCProtraction = DesignVar(-23);
      AnyVar SCElevation = DesignVar(11.5);
      AnyVar GHFlexion = DesignVar(0);
      AnyVar GHExternalRotation = DesignVar(0);
      AnyVar ElbowFlexion = DesignVar(0);
      AnyVar ElbowPronation = DesignVar(0);
      AnyVar WristFlexion = DesignVar(0);
      AnyVar WristAbduction = DesignVar(0);
      /////////////////////////////////////////

      AnyFloat Mask = {0,0,1,0,0,0,0,0,0};
      AnyVector DriverPos = {
        SCProtraction, SCElevation, RangeOfMotion[0], GHFlexion,
        GHExternalRotation ,ElbowFlexion, ElbowPronation,
        WristFlexion ,WristAbduction }*pi/180;
      AnyString OutputFileName =  "MomentArms_Arm_Left_GHAbduction";

      // The following should not be changed
      AnyFolder &SideBodyModelRef=....BodyModel.Left;
      AnyFolder &SideBodyInterfaceRef = ....BodyModel.Interface.Left;
      AnyFolder &SideTrunkMusRef = ....BodyModel.Trunk.MusclesSpineLeft;
      #include "EvaluateMomentArmsStudy.any"

    };

    AnyFolder GHFlexion = {

      // Change the following variables to adjust the moment arm study
      AnyVector RangeOfMotion = DesignVar({-30,70});
      AnyVar SCProtraction = DesignVar(-23);
      AnyVar SCElevation = DesignVar(11.5);
      AnyVar GHAbduction = DesignVar(0);
      AnyVar GHExternalRotation = DesignVar(0);
      AnyVar ElbowFlexion = DesignVar(0);
      AnyVar ElbowPronation = DesignVar(0);
      AnyVar WristFlexion = DesignVar(0);
      AnyVar WristAbduction = DesignVar(0);
      /////////////////////////////////////////

      AnyFloat Mask = {0,0,0,1,0,0,0,0,0};
      AnyVector DriverPos = {
        SCProtraction, SCElevation, GHAbduction, RangeOfMotion[0],
        GHExternalRotation ,ElbowFlexion, ElbowPronation,
        WristFlexion ,WristAbduction }*pi/180;
      AnyString OutputFileName =  "MomentArms_Arm_Left_GHFlexion";

      // The following should not be changed
      AnyFolder &SideBodyModelRef=....BodyModel.Left;
      AnyFolder &SideBodyInterfaceRef = ....BodyModel.Interface.Left;
      AnyFolder &SideTrunkMusRef = ....BodyModel.Trunk.MusclesSpineLeft;
      #include "EvaluateMomentArmsStudy.any"

    };
//
    AnyFolder GHExternalRotation={

      // Change the following variables to adjust the moment arm study
      AnyVector RangeOfMotion = DesignVar({-75,90});
      AnyVar SCProtraction = DesignVar(-23);
      AnyVar SCElevation = DesignVar(11.5);
      AnyVar GHAbduction = DesignVar(0);
      AnyVar GHFlexion = DesignVar(0);
      AnyVar ElbowFlexion = DesignVar(0);
      AnyVar ElbowPronation = DesignVar(0);
      AnyVar WristFlexion = DesignVar(0);
      AnyVar WristAbduction = DesignVar(0);
      /////////////////////////////////////////

      AnyFloat Mask = {0,0,0,0,1,0,0,0,0};
      AnyVector DriverPos = {
        SCProtraction, SCElevation, GHAbduction, GHFlexion,
        RangeOfMotion[0] ,ElbowFlexion, ElbowPronation,
        WristFlexion ,WristAbduction }*pi/180;
      AnyString OutputFileName =  "MomentArms_Arm_Left_GHExternalRotation";

      // The following should not be changed
      AnyFolder &SideBodyModelRef=....BodyModel.Left;
      AnyFolder &SideBodyInterfaceRef = ....BodyModel.Interface.Left;
      AnyFolder &SideTrunkMusRef = ....BodyModel.Trunk.MusclesSpineLeft;
      #include "EvaluateMomentArmsStudy.any"

    };
//
    AnyFolder ElbowFlexion = {

      // Change the following variables to adjust the moment arm study
      AnyVector RangeOfMotion = DesignVar({0, 110});
      AnyVar SCProtraction = DesignVar(-23);
      AnyVar SCElevation = DesignVar(11.5);
      AnyVar GHAbduction = DesignVar(0);
      AnyVar GHFlexion = DesignVar(0);
      AnyVar GHExternalRotation = DesignVar(0);
      AnyVar ElbowPronation = DesignVar(0);
      AnyVar WristFlexion = DesignVar(0);
      AnyVar WristAbduction = DesignVar(0);
      /////////////////////////////////////////

      AnyFloat Mask = {0,0,0,0,0,1,0,0,0};
      AnyVector DriverPos = {
        SCProtraction, SCElevation, GHAbduction, GHFlexion,
        GHExternalRotation ,RangeOfMotion[0], ElbowPronation,
        WristFlexion ,WristAbduction }*pi/180;
      AnyString OutputFileName =  "MomentArms_Arm_Left_ElbowFlexion";

      // The following should not be changed
      AnyFolder &SideBodyModelRef=....BodyModel.Left;
      AnyFolder &SideBodyInterfaceRef = ....BodyModel.Interface.Left;
      AnyFolder &SideTrunkMusRef = ....BodyModel.Trunk.MusclesSpineLeft;
      #include "EvaluateMomentArmsStudy.any"

    };

    AnyFolder ElbowPronation={

      // Change the following variables to adjust the moment arm study
      AnyVector RangeOfMotion = DesignVar({-40, 40});
      AnyVar SCProtraction = DesignVar(-23);
      AnyVar SCElevation = DesignVar(11.5);
      AnyVar GHAbduction = DesignVar(0);
      AnyVar GHFlexion = DesignVar(0);
      AnyVar GHExternalRotation = DesignVar(0);
      AnyVar ElbowFlexion = DesignVar(0);
      AnyVar WristFlexion = DesignVar(0);
      AnyVar WristAbduction = DesignVar(0);
      /////////////////////////////////////////

      AnyFloat Mask = {0,0,0,0,0,0,1,0,0};
      AnyVector DriverPos = {
        SCProtraction, SCElevation, GHAbduction, GHFlexion,
        GHExternalRotation, ElbowFlexion, RangeOfMotion[0],
        WristFlexion ,WristAbduction }*pi/180;
      AnyString OutputFileName =  "MomentArms_Arm_Left_ElbowPronation";

      // The following should not be changed
      AnyFolder &SideBodyModelRef=....BodyModel.Left;
      AnyFolder &SideBodyInterfaceRef = ....BodyModel.Interface.Left;
      AnyFolder &SideTrunkMusRef = ....BodyModel.Trunk.MusclesSpineLeft;
      #include "EvaluateMomentArmsStudy.any"

    };


    AnyFolder WristFlexion ={

      // Change the following variables to adjust the moment arm study
      AnyVector RangeOfMotion = DesignVar({-30,90});
      AnyVar SCProtraction = DesignVar(-23);
      AnyVar SCElevation = DesignVar(11.5);
      AnyVar GHAbduction = DesignVar(0);
      AnyVar GHFlexion = DesignVar(0);
      AnyVar GHExternalRotation = DesignVar(0);
      AnyVar ElbowFlexion = DesignVar(0);
      AnyVar ElbowPronation = DesignVar(0);
      AnyVar WristAbduction = DesignVar(0);
      /////////////////////////////////////////

      AnyFloat Mask = {0,0,0,0,0,0,0,1,0};
      AnyVector DriverPos = {
        SCProtraction, SCElevation, GHAbduction, GHFlexion,
        GHExternalRotation, ElbowFlexion, ElbowPronation,
        RangeOfMotion[0] ,WristAbduction }*pi/180;
      AnyString OutputFileName =  "MomentArms_Arm_Left_WristFlexion";

      // The following should not be changed
      AnyFolder &SideBodyModelRef=....BodyModel.Left;
      AnyFolder &SideBodyInterfaceRef = ....BodyModel.Interface.Left;
      AnyFolder &SideTrunkMusRef = ....BodyModel.Trunk.MusclesSpineLeft;
      #include "EvaluateMomentArmsStudy.any"

    };

    AnyFolder WristAbduction ={

      // Change the following variables to adjust the moment arm study
      AnyVector RangeOfMotion = DesignVar({-20,20});
      AnyVar SCProtraction = DesignVar(-23);
      AnyVar SCElevation = DesignVar(11.5);
      AnyVar GHAbduction = DesignVar(0);
      AnyVar GHFlexion = DesignVar(0);
      AnyVar GHExternalRotation = DesignVar(0);
      AnyVar ElbowFlexion = DesignVar(0);
      AnyVar ElbowPronation = DesignVar(0);
      AnyVar WristFlexion = DesignVar(0);
      /////////////////////////////////////////

      AnyFloat Mask = {0,0,0,0,0,0,0,0,1};
      AnyVector DriverPos = {
        SCProtraction, SCElevation, GHAbduction, GHFlexion,
        GHExternalRotation, ElbowFlexion, ElbowPronation,
        WristFlexion, RangeOfMotion[0] }*pi/180;
      AnyString OutputFileName =  "MomentArms_Arm_Left_WristAbduction";

      // The following should not be changed
      AnyFolder &SideBodyModelRef=....BodyModel.Left;
      AnyFolder &SideBodyInterfaceRef = ....BodyModel.Interface.Left;
      AnyFolder &SideTrunkMusRef = ....BodyModel.Trunk.MusclesSpineLeft;
      #include "EvaluateMomentArmsStudy.any"

    };

   };//Arm
  };//Left


 Run_all_studies ={
   #if BM_ARM_SHOULDER_RHYTHM == OFF
   AnyOperation &RGHFlexionLeft = .Left.Arm.SCProtraction.Run;
   AnyOperation &RGHAbductionLeft = .Left.Arm.SCElevation.Run;
   #endif
   AnyOperation &RGHFlexionLeft = .Left.Arm.GHAbduction.Run;
   AnyOperation &RGHAbductionLeft = .Left.Arm.GHFlexion.Run;
   AnyOperation &RGHExternalRotationLeft = .Left.Arm.GHExternalRotation.Run;
   AnyOperation &RElbowFlexionLeft = .Left.Arm.ElbowFlexion.Run;
   AnyOperation &RWristFlexionLeft = .Left.Arm.WristFlexion.Run;
   AnyOperation &RWristAbductionLeft = .Left.Arm.WristAbduction.Run;
 };
