AnyViaPointMuscle Sternocleidomastoid = {
    AnyMuscleModel &MusMdl = ..MusPar.SternocleidomastoidPar;
    AnyRefNode &Ins = ..ShoulderRef.SternocleidomastoidNode;
    AnyRefNode &Via = ..SkullSegRef.SternocleidomastoidNode;
    AnyRefNode &Ins2 = ..Seg.Clavicula.SternocleidomastoidNode;
    AnyDrawMuscle DrwMus = {#include "../drawSettings/MusDrawSettings.any"};
  };
