/* ----------------------------------------------------------------
Default mannequin drivers:

-The pelvis is locked to the ground
-The remaining degrees of freedom are controlled by parameters in the "<BM_MANNEQUIN_FILE>" file.
-This file is a good way to get an overview of the dof in the full body model
 all the dof in the body model is driven from this file.
-In total

Soeren, March 1, 2006.
----------------------------------------------------------------  */


// The Default mannequin drivers are implemented as a class template.
// The implementation is a bit ackward, since all define statements
// and has to be passed into the class template as arguments.
//
// But the bennefit of this implementation is that all variables
// can be overridden, as if they were variables of a class.
// For example all weight can be customized:
// Main.HumanModel.DefaultMannequinDrivers = {
//       PostureDriverBending.Weights.Fun.Value = 0.1;
// };

// Impletemented in: #include "BodyModel.MannequinDrivers.ClassTemplate.any"
Template_MannequinDrivers DefaultMannequinDrivers(

__BM_MANNEQUIN_DRIVER_WEAK_SWITCH = BM_MANNEQUIN_DRIVER_WEAK_SWITCH,
__BM_GLOBAL_REFERENCE_FRAME_SWITCH = BM_GLOBAL_REFERENCE_FRAME_SWITCH,
__BM_MANNEQUIN_DRIVER_PELVIS_POS_X = BM_MANNEQUIN_DRIVER_PELVIS_POS_X,
__BM_MANNEQUIN_DRIVER_PELVIS_POS_Y = BM_MANNEQUIN_DRIVER_PELVIS_POS_Y,
__BM_MANNEQUIN_DRIVER_PELVIS_POS_Z = BM_MANNEQUIN_DRIVER_PELVIS_POS_Z,
__BM_MANNEQUIN_DRIVER_PELVIS_ROT_Z = BM_MANNEQUIN_DRIVER_PELVIS_ROT_Z,
__BM_MANNEQUIN_DRIVER_PELVIS_ROT_Y = BM_MANNEQUIN_DRIVER_PELVIS_ROT_Y,
__BM_MANNEQUIN_DRIVER_PELVIS_ROT_X = BM_MANNEQUIN_DRIVER_PELVIS_ROT_X,
__BM_MANNEQUIN_DRIVER_NECK = BM_MANNEQUIN_DRIVER_NECK,
__BM_MANNEQUIN_DRIVER_PELVIS_THORAX_LATERAL_BENDING = BM_MANNEQUIN_DRIVER_PELVIS_THORAX_LATERAL_BENDING,
__BM_MANNEQUIN_DRIVER_PELVIS_THORAX_ROTATION = BM_MANNEQUIN_DRIVER_PELVIS_THORAX_ROTATION,
__BM_MANNEQUIN_DRIVER_PELVIS_THORAX_EXTENSION = BM_MANNEQUIN_DRIVER_PELVIS_THORAX_EXTENSION,
__BM_MANNEQUIN_DRIVER_STERNOCLAVICULAR_PROTRACTION_RIGHT = BM_MANNEQUIN_DRIVER_STERNOCLAVICULAR_PROTRACTION_RIGHT,
__BM_MANNEQUIN_DRIVER_STERNOCLAVICULAR_ELEVATION_RIGHT = BM_MANNEQUIN_DRIVER_STERNOCLAVICULAR_ELEVATION_RIGHT,
__BM_MANNEQUIN_DRIVER_STERNOCLAVICULAR_AXIAL_ROTATION_RIGHT = BM_MANNEQUIN_DRIVER_STERNOCLAVICULAR_AXIAL_ROTATION_RIGHT,
__BM_MANNEQUIN_DRIVER_GLENOHUMERAL_ABDUCTION_RIGHT = BM_MANNEQUIN_DRIVER_GLENOHUMERAL_ABDUCTION_RIGHT,
__BM_MANNEQUIN_DRIVER_GLENOHUMERAL_FLEXION_RIGHT = BM_MANNEQUIN_DRIVER_GLENOHUMERAL_FLEXION_RIGHT,
__BM_MANNEQUIN_DRIVER_GLENOHUMERAL_EXTERNAL_ROTATION_RIGHT = BM_MANNEQUIN_DRIVER_GLENOHUMERAL_EXTERNAL_ROTATION_RIGHT,
__BM_MANNEQUIN_DRIVER_ELBOW_FLEXION_RIGHT = BM_MANNEQUIN_DRIVER_ELBOW_FLEXION_RIGHT,
__BM_MANNEQUIN_DRIVER_ELBOW_PRONATION_RIGHT = BM_MANNEQUIN_DRIVER_ELBOW_PRONATION_RIGHT,
__BM_MANNEQUIN_DRIVER_WRIST_FLEXION_RIGHT = BM_MANNEQUIN_DRIVER_WRIST_FLEXION_RIGHT,
__BM_MANNEQUIN_DRIVER_WRIST_ABDUCTION_RIGHT = BM_MANNEQUIN_DRIVER_WRIST_ABDUCTION_RIGHT,
__BM_MANNEQUIN_DRIVER_HIP_FLEXION_RIGHT = BM_MANNEQUIN_DRIVER_HIP_FLEXION_RIGHT,
__BM_MANNEQUIN_DRIVER_HIP_ABDUCTION_RIGHT = BM_MANNEQUIN_DRIVER_HIP_ABDUCTION_RIGHT,
__BM_MANNEQUIN_DRIVER_HIP_EXTERNAL_ROTATION_RIGHT = BM_MANNEQUIN_DRIVER_HIP_EXTERNAL_ROTATION_RIGHT,
__BM_MANNEQUIN_DRIVER_KNEE_FLEXION_RIGHT = BM_MANNEQUIN_DRIVER_KNEE_FLEXION_RIGHT,
__BM_MANNEQUIN_DRIVER_ANKLE_FLEXION_RIGHT = BM_MANNEQUIN_DRIVER_ANKLE_FLEXION_RIGHT,
__BM_MANNEQUIN_DRIVER_ANKLE_EVERSION_RIGHT = BM_MANNEQUIN_DRIVER_ANKLE_EVERSION_RIGHT,
__BM_MANNEQUIN_DRIVER_ANKLE_SUBTALAR_EVERSION_RIGHT = BM_MANNEQUIN_DRIVER_ANKLE_SUBTALAR_EVERSION_RIGHT,
__BM_MANNEQUIN_DRIVER_STERNOCLAVICULAR_PROTRACTION_LEFT = BM_MANNEQUIN_DRIVER_STERNOCLAVICULAR_PROTRACTION_LEFT,
__BM_MANNEQUIN_DRIVER_STERNOCLAVICULAR_ELEVATION_LEFT = BM_MANNEQUIN_DRIVER_STERNOCLAVICULAR_ELEVATION_LEFT,
__BM_MANNEQUIN_DRIVER_STERNOCLAVICULAR_AXIAL_ROTATION_LEFT = BM_MANNEQUIN_DRIVER_STERNOCLAVICULAR_AXIAL_ROTATION_LEFT,
__BM_MANNEQUIN_DRIVER_GLENOHUMERAL_ABDUCTION_LEFT = BM_MANNEQUIN_DRIVER_GLENOHUMERAL_ABDUCTION_LEFT,
__BM_MANNEQUIN_DRIVER_GLENOHUMERAL_FLEXION_LEFT = BM_MANNEQUIN_DRIVER_GLENOHUMERAL_FLEXION_LEFT,
__BM_MANNEQUIN_DRIVER_GLENOHUMERAL_EXTERNAL_ROTATION_LEFT = BM_MANNEQUIN_DRIVER_GLENOHUMERAL_EXTERNAL_ROTATION_LEFT,
__BM_MANNEQUIN_DRIVER_ELBOW_FLEXION_LEFT = BM_MANNEQUIN_DRIVER_ELBOW_FLEXION_LEFT,
__BM_MANNEQUIN_DRIVER_ELBOW_PRONATION_LEFT = BM_MANNEQUIN_DRIVER_ELBOW_PRONATION_LEFT,
__BM_MANNEQUIN_DRIVER_WRIST_FLEXION_LEFT = BM_MANNEQUIN_DRIVER_WRIST_FLEXION_LEFT,
__BM_MANNEQUIN_DRIVER_WRIST_ABDUCTION_LEFT = BM_MANNEQUIN_DRIVER_WRIST_ABDUCTION_LEFT,
__BM_MANNEQUIN_DRIVER_HIP_FLEXION_LEFT = BM_MANNEQUIN_DRIVER_HIP_FLEXION_LEFT,
__BM_MANNEQUIN_DRIVER_HIP_ABDUCTION_LEFT = BM_MANNEQUIN_DRIVER_HIP_ABDUCTION_LEFT,
__BM_MANNEQUIN_DRIVER_HIP_EXTERNAL_ROTATION_LEFT = BM_MANNEQUIN_DRIVER_HIP_EXTERNAL_ROTATION_LEFT,
__BM_MANNEQUIN_DRIVER_KNEE_FLEXION_LEFT = BM_MANNEQUIN_DRIVER_KNEE_FLEXION_LEFT,
__BM_MANNEQUIN_DRIVER_ANKLE_FLEXION_LEFT = BM_MANNEQUIN_DRIVER_ANKLE_FLEXION_LEFT,
__BM_MANNEQUIN_DRIVER_ANKLE_EVERSION_LEFT = BM_MANNEQUIN_DRIVER_ANKLE_EVERSION_LEFT,
__BM_MANNEQUIN_DRIVER_ANKLE_SUBTALAR_EVERSION_LEFT = BM_MANNEQUIN_DRIVER_ANKLE_SUBTALAR_EVERSION_LEFT,
__BM_MANNEQUIN_DRIVER_HAND_RIGHT = BM_MANNEQUIN_DRIVER_HAND_RIGHT,
__BM_MANNEQUIN_DRIVER_HAND_LEFT = BM_MANNEQUIN_DRIVER_HAND_LEFT,
__LEG_MODEL_Leg_ = _LEG_MODEL_Leg_,
__LEG_MODEL_TLEM_ = _LEG_MODEL_TLEM_,
__LEG_MODEL_TLEM2_ = _LEG_MODEL_TLEM2_,
__BM_LEG_MODEL = BM_LEG_MODEL,
__BM_LEG_RIGHT = BM_LEG_RIGHT,
__BM_ARM_RIGHT = BM_ARM_RIGHT,
__BM_LEG_LEFT = BM_LEG_LEFT,
__BM_ARM_LEFT = BM_ARM_LEFT,
__BM_ARM_DETAILED_HAND = BM_ARM_DETAILED_HAND,
__BM_TRUNK_LUMBAR_RHYTHM  = BM_TRUNK_LUMBAR_RHYTHM
)= {};
