// Set BM_LEG_MODEL to OFF if both BM_LEG_RIGHT/LEFT are OFF
#ifdef BM_LEG_RIGHT
#ifdef BM_LEG_LEFT
  #if BM_LEG_RIGHT == OFF & BM_LEG_LEFT == OFF
  #ifdef BM_LEG_MODEL
      #undef BM_LEG_MODEL
    #endif
    #define BM_LEG_MODEL OFF
  #endif
#endif
#endif

// Allow for BM_LEG_MODEL to switch Legs models off completely.
#ifdef BM_LEG_MODEL
  #if BM_LEG_MODEL == OFF
    #ifndef BM_LEG_RIGHT
      #define BM_LEG_RIGHT OFF
    #endif
    #ifndef BM_LEG_LEFT
      #define BM_LEG_LEFT OFF
    #endif
  #endif
#endif

//
#ifndef BM_ARM_SHOULDER_RHYTHM
#ifdef BM_ARM_SHOULDER_RHYTHM_RIGHT
#define BM_ARM_SHOULDER_RHYTHM BM_ARM_SHOULDER_RHYTHM_RIGHT
   AnyInt deprecated_left_right_rythm= warn(0, strformat("\n"+
      "------------------------------------------------------------------------------------------------------\n"+
      "    `BM_ARM_SHOULDER_RYTHM_LEFT` is deprecated.\n"+
      "    The single statement `BM_ARM_SHOULDER_RYTHM` sets the shoulder rythm for both sides.\n"+
      "-------------------------------------------------------------------------------------------------------\n"));
#endif
#endif


#ifndef BM_ARM_SHOULDER_RHYTHM
#ifdef BM_ARM_SHOULDER_RHYTHM_LEFT
#define BM_ARM_SHOULDER_RHYTHM BM_ARM_SHOULDER_RHYTHM_LEFT
   AnyInt deprecated_left_right_rythm= warn(0, strformat("\n"+
      "------------------------------------------------------------------------------------------------------\n"+
      "    `BM_ARM_SHOULDER_RYTHM_RIGHT` is deprecated.\n"+
      "    The single statement `BM_ARM_SHOULDER_RYTHM` sets the shoulder rythm for both sides.\n"+
      "-------------------------------------------------------------------------------------------------------"));
#endif
#endif


//
#ifndef BM_ARM_DETAILED_HAND
#ifdef BM_ARM_DETAIL_HAND_RIGHT
#define BM_ARM_DETAILED_HAND BM_ARM_DETAIL_HAND_RIGHT
   AnyInt deprecated_left_right_detail_hand= warn(0, strformat("\n"+
      "------------------------------------------------------------------------------------------------------\n"+
      "    `BM_ARM_DETAIL_HAND_RIGHT` is deprecated.\n"+
      "    The single statement `BM_ARM_DETAILED_HAND` sets hand model for both sides.\n"+
      "-------------------------------------------------------------------------------------------------------"));
#endif
#endif


#ifndef BM_ARM_DETAILED_HAND
#ifdef BM_ARM_DETAIL_HAND_LEFT
#define BM_ARM_DETAILED_HAND BM_ARM_DETAIL_HAND_LEFT
   AnyInt deprecated_left_right_detail_hand= warn(0, strformat("\n"+
      "------------------------------------------------------------------------------------------------------\n"+
      "    `BM_ARM_DETAIL_HAND_LEFT` is deprecated.\n"+
      "    The single statement `BM_ARM_DETAILED_HAND` sets hand model for both sides.\n"+
      "-------------------------------------------------------------------------------------------------------"));
#endif
#endif


#ifdef BM_SCALING_MY_FILE
   AnyInt deprecated_BM_SCALING_MY_FILE = warn(0, strformat("\n"+
      "------------------------------------------------------------------------------------------------------\n"+
      "    `BM_SCALING_MY_FILE is deprecated, and renamed to `BM_SCALING_FILE`\n"+
      "-------------------------------------------------------------------------------------------------------"));
  #ifndef BM_SCALING_FILE
    #define BM_SCALING_FILE BM_SCALING_MY_FILE
  #endif
#endif
