//This file controls which calibrations to be made on the model
AnyFolder EvaluateMomentArms=
{
 #ifndef MUSCLE_GROUPS
 #define MUSCLE_GROUPS 0
 #endif

 #if BM_LEG_RIGHT | BM_ARM_RIGHT
 AnyFolder Right = {};
 #endif
 #if BM_LEG_LEFT | BM_ARM_LEFT
 AnyFolder Left = {};
 #endif
 AnyFolder Trunk = {};

 #if BM_LEG_RIGHT & BM_LEG_MODEL_IS_TLEM & (BM_LEG_MUSCLES_RIGHT)
 #include "<BM_LEG_TLEM_PATH>/EvaluateMomentArmsSequenceRight.any"
 #endif

 #if BM_LEG_LEFT & BM_LEG_MODEL_IS_TLEM & (BM_LEG_MUSCLES_LEFT)
 #include "<BM_LEG_TLEM_PATH>/EvaluateMomentArmsSequenceLeft.any"
 #endif

 #if BM_LEG_RIGHT & (BM_LEG_MODEL == _LEG_MODEL_LEG_) & (BM_LEG_MUSCLES_RIGHT)
 #include "../../Leg/EvaluateMomentArmsSequenceRight.any"
 #endif

 #if BM_LEG_LEFT & (BM_LEG_MODEL == _LEG_MODEL_LEG_) & (BM_LEG_MUSCLES_LEFT)
 #include "../../Leg/EvaluateMomentArmsSequenceLeft.any"
 #endif

 #if BM_ARM_RIGHT & BM_ARM_MUSCLES_RIGHT
 #ifndef EVALUATE_MOMENT_ARMS_IVJs
   #include "../../Arm/MomentArmSequenceRight.any"
 #endif
 #endif

 #if BM_ARM_LEFT & BM_ARM_MUSCLES_LEFT
 #ifndef EVALUATE_MOMENT_ARMS_IVJs
   #include "../../Arm/MomentArmSequenceLeft.any"
 #endif
 #endif
 #if (BM_TRUNK_MUSCLES != OFF)
 #ifdef EVALUATE_MOMENT_ARMS_IVJs
 #include "../../Trunk/EvaluateMomentArmsSequence_IVJs.any"
 #else
 #include "../../Trunk/EvaluateMomentArmsSequence.any"
 #endif
 #endif

  AnyOperationSequence Run_all_studies ={
     /// Dummy operation to handle case when no other operations are added
     AnyOperationDummy dummy = {};
  };


};
