Left = {

  AnyFolder ShoulderArm = {

      AnyFolder &Scaling = ...Scaling.GeometricalScaling.Left;
      AnyFolder &MassScaling = ...Scaling.MassScaling.Left;
      AnyFolder &StrengthScaling = ...Scaling.StrengthScaling.Left;

      #define _LEFT_RIGHT_ "Left"
      #define _SIDE_ Left

      #include "..\..\Arm\ShoulderArmModel.root.any"

      #undef _SIDE_
      #undef _LEFT_RIGHT_

      //Reference to interface folder
      AnyFolder &InterfaceFolder =..Interface.Left;

      //Reference to folder
      AnyFolder &MannequinValuesFolder = ..MannequinValuesFromModel.AnyFolder_Posture.AnyFolder_Left;

      #include "../Include/SettingsShoulderArm.any"

      //-------------------------------------------------------
      // Interface references that specifies what the arm "Arm/ShoulderArm.any" should connect to
      //-------------------------------------------------------
      //This point is used for attachement of the arm to the shoulder
      AnyRefFrame &ShoulderRef = ..Trunk.Segments.SternumSeg.iji;

      //This is a sign variable which indicates that this is the right side
      AnyVar Sign = -1;

      AnyFolder BonesOpacity = {
        AnyVar Clavicula = Main.DrawSettings.BonesOpacity.LeftClavicula;
        AnyVar Scapula = Main.DrawSettings.BonesOpacity.LeftScapula;
        AnyVar Humerus = Main.DrawSettings.BonesOpacity.LeftHumerus;
        AnyVar Ulna = Main.DrawSettings.BonesOpacity.LeftUlna;
        AnyVar Radius = Main.DrawSettings.BonesOpacity.LeftRadius;
        AnyVar Hand = Main.DrawSettings.BonesOpacity.LeftHand;
      };

      AnyFolder MomentMeasure=
      {
           #include "..\..\Arm\ArmMoments.any"
      };

    }; //End ShoulderArm

  };


  #include "../../Arm/LeftArmMusclesSelectedOutput.any"
