  AnyFolder Trunk ={

    //This is the reference to the root file for the spine
    #include "..\..\Trunk\TrunkModel.root.any"

    //Reference to mannequin folder
    AnyFolder &JointPos=..Mannequin.Posture;

    //Reference to folder which contains the interface of the trunk
    AnyFolder &InterfaceFolder =.Interface.Trunk;

    //Reference to folder
    AnyFolder &MannequinValuesFolder =.MannequinValuesFromModel.AnyFolder_Posture;

    #include "../Include/SettingsTrunk.any"

  };//Trunk


  Interface =
  {
    AnyFolder Trunk = {};
  };

  #include "../../Trunk/SelectedOutput/TrunkSelectedOutput.any"

  //------- Joint muscles for the SelectedOutput

  // Lumbar spine joint muscles
  #if BM_TRUNK_LUMBAR_MUSCLES == CONST_MUSCLES_NONE
    #include "../../Trunk/SelectedOutput/LumbarJointMusclesSelectedOutput.any"
  #endif

  // Cervical spine joint muscles
  #if BM_TRUNK_CERVICAL_MUSCLES == CONST_MUSCLES_NONE
    #include "../../Trunk/SelectedOutput/CervicalJointMusclesSelectedOutput.any"
  #endif

  // Thoracic spine joint muscles
  #if BM_TRUNK_THORACIC_MUSCLES == CONST_MUSCLES_NONE
      // --- PLACEHOLDER ---
  #endif


  //------- Muscle activity envelop for the SelectedOutput
  #include "../../Trunk/SelectedOutput/TrunkMuscleActivityEnvelope.any"


  Trunk = {
    #include "..\..\Trunk\DiscStiffness.any"
  };
