#ifndef ANYBODY_PATH_BODY_GENERICBODYMODEL
  #path ANYBODY_PATH_BODY_GENERICBODYMODEL "<ANYBODY_PATH_BODY>\BodyModels\GenericBodyModel\"
#endif

AnyFolder HumanModel={
  AnyFolder Config =
  {
  #include "<ANYBODY_PATH_BODY_GENERICBODYMODEL>\BodyModel.defaults.preprocess.any"
  #include "<ANYBODY_PATH_BODY_GENERICBODYMODEL>\BodyModel.defaults.any"
  #include "<ANYBODY_PATH_BODY_GENERICBODYMODEL>\BodyModel.BodyPartsSetup.any"
  #include "<ANYBODY_PATH_BODY_GENERICBODYMODEL>\BodyModel.config_info.any"
  };

  #ifdef BM_SCALING
   #if BM_SCALING != _SCALING_STANDARD_
    AnyFolder AnthroDataSubject = { #include "<BM_SCALING_ANTHRO_FILE>" };
    Scaling.Scaling = {AnyFolder& AnthroDataSubjectRef = ..AnthroDataSubject;};
   #endif
  #endif

  AnyFolder BodyModelWithDefaultDrivers = {
    AnyFolder &BodyModel = .BodyModel;
    AnyFolder &Drivers = .DefaultMannequinDrivers;
  };


  #ifndef BM_MANNEQUIN_FILE
    /// This is the Mannequin folder implemented as a class template.
    /// It behaves as a class with default values which can be overridden
    /// in your applicaiton:
    ///
    /// .. code_block:: AnyScript
    ///
    ///    Main.HumanModel.Mannequin.Posture =
    ///    {
    ///      ElbowPronation = -70;
    ///    };
    ///
    /// It is still possible to define your own Mannequin file in your application:
    ///
    /// .. code_block:: AnyScript
    ///
    ///     #path BM_MANNEQUIN_FILE "MyMannequinFile.any"
    ///
    Template_Mannequin Mannequin = {};
    //Template defined in in #paths"BodyModels/GenericBodyModel/BodyModel.ClassTemplates.any"
  #else
    // Include user defined Mannequin file
    #include "<BM_MANNEQUIN_FILE>"
  #endif


#if BM_DRAWSETTINGS_SKIP == OFF
  Main =
  {
  #ifndef BM_DRAWSETTINGS_FILE
    Template_DrawSettings DrawSettings = {};
  #else
    #include "<BM_DRAWSETTINGS_FILE>"
  #endif
  };
#endif

  #include  "<ANYBODY_PATH_BODY_GENERICBODYMODEL>\BodyModel.any"

  AnyFolder StrengthParameters={
    AnyVar SpecificMuscleTensionSpine= BM_TRUNK_STRENGTH_INDEX*90; //N/cm^2
    AnyVar StrengthIndexLeg= DesignVar(BM_LEG_STRENGTH_INDEX);
    AnyVar SpecificMuscleTensionShoulderArm= BM_ARM_STRENGTH_INDEX*90; //N/cm^2
  };

  // By default there is an option to define a custom scaling law
  #include "<ANYBODY_PATH_BODY>\Scaling\ScalingCustom.any"

  Scaling={
   //Base scaling laws according to the configuration file

   Scaling.StandardParameters = {
     AnyFolder& Trunk_ModelParameters = ...BodyModel.Trunk.ModelParameters;
     #if BM_LEG_MODEL != OFF
       AnyFolder& Leg_ModelParameters = ...BodyModel.Trunk.SegmentsLumbar.PelvisSeg.Leg_ModelParameters;
     #endif
   };

   #if BM_SCALING == _SCALING_CUSTOM_
     // include your own custom scaling law, please refer to existing ones for reference
     #include "<BM_SCALING_MY_FILE>"
   #endif


   #if (BM_SCALING == _SCALING_UNIFORM_EXTMEASUREMENTS_) | (BM_SCALING == _SCALING_LENGTHMASS_EXTMEASUREMENTS_) | (BM_SCALING == _SCALING_LENGTHMASSFAT_EXTMEASUREMENTS_)
     #ifndef STANDARDPARAM_EXTERIOR
       #define STANDARDPARAM_EXTERIOR
     #endif
   #endif

   //Base scaling laws according to the configuration file
   #if BM_SCALING == _SCALING_STANDARD_
     #include "<ANYBODY_PATH_BODY>\Scaling\ScalingStandard.any"
   #endif

   #if (BM_SCALING == _SCALING_UNIFORM_) | (BM_SCALING == _SCALING_UNIFORM_EXTMEASUREMENTS_)
     #include "<ANYBODY_PATH_BODY>\Scaling\ScalingUniform.any"
   #endif

   #if (BM_SCALING == _SCALING_LENGTHMASS_) | (BM_SCALING == _SCALING_LENGTHMASS_EXTMEASUREMENTS_)
     #include "<ANYBODY_PATH_BODY>\Scaling\ScalingLengthMass.any"
   #endif

   #if (BM_SCALING == _SCALING_LENGTHMASSFAT_) | (BM_SCALING == _SCALING_LENGTHMASSFAT_EXTMEASUREMENTS_)
     #include "<ANYBODY_PATH_BODY>\Scaling\ScalingLengthMassFat.any"
   #endif

   #ifdef STANDARDPARAM_EXTERIOR
     #undef STANDARDPARAM_EXTERIOR
   #endif

   #if BM_SCALING == _SCALING_LENGTHMASSFAT_MULTIDOFS_
     #include "<ANYBODY_PATH_BODY>\Scaling\ScalingLengthMassFatModified.any"
     //#include "<ANYBODY_PATH_BODY>\Scaling\ScalingLengthMassFatMultiDofs.any"
   #endif
 };

 AnyFolder DefaultMannequinDrivers = {
   #include "<ANYBODY_PATH_BODY_GENERICBODYMODEL>\BodyModel.MannequinDrivers.any"
 };
};
