//This is the standard parameters for the leg fot the unscaled model

/// Standard parameter for the foot
AnyFolder Foot = {
  AnyVar Mass = 0.0145*.BodyParameters.BodyMass; // Winter
  AnyVar Length = ( (0.06+0.012)^2 + (0.06+0.126)^2 + 0.023^2 )^0.5;
  AnyVar Density = .BodyParameters.Density;


};

/// Standard parameter for the shank
AnyFolder Shank = {
  AnyVar Mass =0.0465*.BodyParameters.BodyMass; // Winter
  AnyVar Length = 0.1992- (-0.2608);
  AnyVar Density = .BodyParameters.Density;
};

/// Standard parameter for the thigh
AnyFolder Thigh = {
  AnyVar Mass = 0.1*.BodyParameters.BodyMass; // Winter
  AnyVar Length = ( (-0.025)^2 + (0.197+0.2580)^2 + (-0.028+0.038)^2 )^0.5;
  AnyVar Density = .BodyParameters.Density;
};
