AnyFileVar FilenameThigh = "femur";
AnyFileVar FilenameShank = "tibia";
AnyFileVar FilenameFibula = "fibula";
AnyFileVar FilenamePelvis = "pelvis";
AnyFileVar FilenameSacrum = "SacrumSymmSeg";
AnyFileVar FilenameFoot = "foot";
AnyFileVar FilenamePatella = "patella";
AnyFileVar FilenameTalus = "talus";

AnyFileVar FilenameThighSkin = "Cad3_Femur_Skin_ISB";
AnyFileVar FilenameShankSkin = "Cad3_Tibia_Skin_ISB";
AnyFileVar FilenamePelvisSkin = "Cad3_Pelvis_Skin_ISB";
AnyFileVar FilenameFootSkin = "Foot_Skin_ISB";

AnyFileVar FilenameThighMuscleTissue = "Cad3_Femur_MuscleTissue_ISB";
AnyFileVar FilenameShankMuscleTissue = "Cad3_Tibia_MuscleTissue_ISB";
AnyFileVar FilenamePelvisMuscleTissue = "Cad3_Pelvis_MuscleTissue_ISB";
AnyFileVar FilenameFootMuscleTissue = "Foot_Muscles_ISB";

AnyFileVar FilenameThighMorphing = "cad 3 femur ISB final";
AnyFileVar FilenameShankMorphing = "cad 3 tibia fibula ISB final";
AnyFileVar FilenamePelvisMorphing = "cad 3 pelvis ISB final HIP";
