 SegmentsLumbar.L1Seg = {
  AnyRefNode MFL1T8NodeR  = {sRel = .Scale(.StdPar.Right.MFL1T8Node_pos); };
  AnyRefNode MFL1T8NodeL  = {sRel = .Scale(.StdPar.Left.MFL1T8Node_pos); };
  AnyRefNode MFL1T9NodeR  = {sRel = .Scale(.StdPar.Right.MFL1T9Node_pos); };
  AnyRefNode MFL1T9NodeL  = {sRel = .Scale(.StdPar.Left.MFL1T9Node_pos); };
  AnyRefNode MFL1T10NodeR = {sRel = .Scale(.StdPar.Right.MFL1T10Node_pos); };
  AnyRefNode MFL1T10NodeL = {sRel = .Scale(.StdPar.Left.MFL1T10Node_pos); };

  AnyRefNode SPL1T3Node = {sRel = .Scale(.StdPar.SPL1T3Node_pos);};
  AnyRefNode SPL1T4Node = {sRel = .Scale(.StdPar.SPL1T4Node_pos);};
  AnyRefNode SPL1T5Node = {sRel = .Scale(.StdPar.SPL1T5Node_pos);};

  AnyRefNode SEL1T8NodeR  = {sRel = .Scale(.StdPar.Right.SEL1T8Node_pos);};
  AnyRefNode SEL1T8NodeL  = {sRel = .Scale(.StdPar.Left.SEL1T8Node_pos);};
  AnyRefNode SEL1T10NodeR = {sRel = .Scale(.StdPar.Right.SEL1T10Node_pos);};
  AnyRefNode SEL1T10NodeL = {sRel = .Scale(.StdPar.Left.SEL1T10Node_pos);};
  AnyRefNode SEL1T11NodeR = {sRel = .Scale(.StdPar.Right.SEL1T11Node_pos);};
  AnyRefNode SEL1T11NodeL = {sRel = .Scale(.StdPar.Left.SEL1T11Node_pos);};

};

SegmentsLumbar.L2Seg = {
  AnyRefNode MFL2T9NodeR  = {sRel = .Scale(.StdPar.Right.MFL2T9Node_pos);};
  AnyRefNode MFL2T9NodeL  = {sRel = .Scale(.StdPar.Left.MFL2T9Node_pos);};
  AnyRefNode MFL2T10NodeR = {sRel = .Scale(.StdPar.Right.MFL2T10Node_pos);};
  AnyRefNode MFL2T10NodeL = {sRel = .Scale(.StdPar.Left.MFL2T10Node_pos);};
  AnyRefNode MFL2T11NodeR = {sRel = .Scale(.StdPar.Right.MFL2T11Node_pos);};
  AnyRefNode MFL2T11NodeL = {sRel = .Scale(.StdPar.Left.MFL2T11Node_pos);};

  AnyRefNode SEL2T9NodeR  = {sRel = .Scale(.StdPar.Right.SEL2T9Node_pos);};
  AnyRefNode SEL2T9NodeL  = {sRel = .Scale(.StdPar.Left.SEL2T9Node_pos);};
  AnyRefNode SEL2T10NodeR = {sRel = .Scale(.StdPar.Right.SEL2T10Node_pos);};
  AnyRefNode SEL2T10NodeL = {sRel = .Scale(.StdPar.Left.SEL2T10Node_pos);};
  AnyRefNode SEL2T11NodeR = {sRel = .Scale(.StdPar.Right.SEL2T11Node_pos);};
  AnyRefNode SEL2T11NodeL = {sRel = .Scale(.StdPar.Left.SEL2T11Node_pos);};
  AnyRefNode SEL2T12NodeR = {sRel = .Scale(.StdPar.Right.SEL2T12Node_pos);};
  AnyRefNode SEL2T12NodeL = {sRel = .Scale(.StdPar.Left.SEL2T12Node_pos);};

};

SegmentsLumbar.L3Seg = {
  AnyRefNode MFL3T10NodeR = {sRel = .Scale(.StdPar.Right.MFL3T10Node_pos);};
  AnyRefNode MFL3T10NodeL = {sRel = .Scale(.StdPar.Left.MFL3T10Node_pos);};
  AnyRefNode MFL3T11NodeR = {sRel = .Scale(.StdPar.Right.MFL3T11Node_pos);};
  AnyRefNode MFL3T11NodeL = {sRel = .Scale(.StdPar.Left.MFL3T11Node_pos);};
  AnyRefNode MFL3T12NodeR = {sRel = .Scale(.StdPar.Right.MFL3T12Node_pos);};
  AnyRefNode MFL3T12NodeL = {sRel = .Scale(.StdPar.Left.MFL3T12Node_pos);};

  AnyRefNode SEL3T11NodeR = {sRel = .Scale(.StdPar.Right.SEL3T11Node_pos);};
  AnyRefNode SEL3T11NodeL = {sRel = .Scale(.StdPar.Left.SEL3T11Node_pos);};
  AnyRefNode SEL3T12NodeR = {sRel = .Scale(.StdPar.Right.SEL3T12Node_pos);};
  AnyRefNode SEL3T12NodeL = {sRel = .Scale(.StdPar.Left.SEL3T12Node_pos);};

};

SegmentsLumbar.L4Seg = {
  AnyRefNode MFL4T11NodeR = {sRel = .Scale(.StdPar.Right.MFL4T11Node_pos);};
  AnyRefNode MFL4T11NodeL = {sRel = .Scale(.StdPar.Left.MFL4T11Node_pos);};
  AnyRefNode MFL4T12NodeR = {sRel = .Scale(.StdPar.Right.MFL4T12Node_pos);};
  AnyRefNode MFL4T12NodeL = {sRel = .Scale(.StdPar.Left.MFL4T12Node_pos);};

};

SegmentsLumbar.L5Seg = {
  AnyRefNode MFL5T12NodeR = {sRel = .Scale(.StdPar.Right.MFL5T12Node_pos);};
  AnyRefNode MFL5T12NodeL = {sRel = .Scale(.StdPar.Left.MFL5T12Node_pos);};

};


SegmentsThorax.ThoraxSeg = {
  AnyRefNode MFL1T8NodeR  = {sRel = .Scale(.StdPar.Right.MFL1T8Node_pos);};
  AnyRefNode MFL1T8NodeL  = {sRel = .Scale(.StdPar.Left.MFL1T8Node_pos);};
  AnyRefNode MFL1T9NodeR  = {sRel = .Scale(.StdPar.Right.MFL1T9Node_pos);};
  AnyRefNode MFL1T9NodeL  = {sRel = .Scale(.StdPar.Left.MFL1T9Node_pos);};
  AnyRefNode MFL1T10NodeR = {sRel = .Scale(.StdPar.Right.MFL1T10Node_pos);};
  AnyRefNode MFL1T10NodeL = {sRel = .Scale(.StdPar.Left.MFL1T10Node_pos);};
  AnyRefNode MFL2T9NodeR  = {sRel = .Scale(.StdPar.Right.MFL2T9Node_pos);};
  AnyRefNode MFL2T9NodeL  = {sRel = .Scale(.StdPar.Left.MFL2T9Node_pos);};
  AnyRefNode MFL2T10NodeR = {sRel = .Scale(.StdPar.Right.MFL2T10Node_pos);};
  AnyRefNode MFL2T10NodeL = {sRel = .Scale(.StdPar.Left.MFL2T10Node_pos);};
  AnyRefNode MFL2T11NodeR = {sRel = .Scale(.StdPar.Right.MFL2T11Node_pos);};
  AnyRefNode MFL2T11NodeL = {sRel = .Scale(.StdPar.Left.MFL2T11Node_pos);};
  AnyRefNode MFL3T10NodeR = {sRel = .Scale(.StdPar.Right.MFL3T10Node_pos);};
  AnyRefNode MFL3T10NodeL = {sRel = .Scale(.StdPar.Left.MFL3T10Node_pos);};
  AnyRefNode MFL3T11NodeR = {sRel = .Scale(.StdPar.Right.MFL3T11Node_pos);};
  AnyRefNode MFL3T11NodeL = {sRel = .Scale(.StdPar.Left.MFL3T11Node_pos);};
  AnyRefNode MFL3T12NodeR = {sRel = .Scale(.StdPar.Right.MFL3T12Node_pos);};
  AnyRefNode MFL3T12NodeL = {sRel = .Scale(.StdPar.Left.MFL3T12Node_pos);};
  AnyRefNode MFL4T11NodeR = {sRel = .Scale(.StdPar.Right.MFL4T11Node_pos);};
  AnyRefNode MFL4T11NodeL = {sRel = .Scale(.StdPar.Left.MFL4T11Node_pos);};
  AnyRefNode MFL4T12NodeR = {sRel = .Scale(.StdPar.Right.MFL4T12Node_pos);};
  AnyRefNode MFL4T12NodeL = {sRel = .Scale(.StdPar.Left.MFL4T12Node_pos);};
  AnyRefNode MFL5T12NodeR = {sRel = .Scale(.StdPar.Right.MFL5T12Node_pos);};
  AnyRefNode MFL5T12NodeL = {sRel = .Scale(.StdPar.Left.MFL5T12Node_pos);};
  AnyRefNode SPL1T5Node   = {sRel = .Scale(.StdPar.SPL1T5Node_pos);};
  AnyRefNode SPL1T4Node   = {sRel = .Scale(.StdPar.SPL1T4Node_pos);};
  AnyRefNode SPL1T3Node   = {sRel = .Scale(.StdPar.SPL1T3Node_pos);};
  AnyRefNode SEL1T8NodeR  = {sRel = .Scale(.StdPar.Right.SEL1T8Node_pos);};
  AnyRefNode SEL1T8NodeL  = {sRel = .Scale(.StdPar.Left.SEL1T8Node_pos);};
  AnyRefNode SEL1T10NodeR = {sRel = .Scale(.StdPar.Right.SEL1T10Node_pos);};
  AnyRefNode SEL1T10NodeL = {sRel = .Scale(.StdPar.Left.SEL1T10Node_pos);};
  AnyRefNode SEL1T11NodeR = {sRel = .Scale(.StdPar.Right.SEL1T11Node_pos);};
  AnyRefNode SEL1T11NodeL = {sRel = .Scale(.StdPar.Left.SEL1T11Node_pos);};
  AnyRefNode SEL2T9NodeR  = {sRel = .Scale(.StdPar.Right.SEL2T9Node_pos);};
  AnyRefNode SEL2T9NodeL  = {sRel = .Scale(.StdPar.Left.SEL2T9Node_pos);};
  AnyRefNode SEL2T10NodeR = {sRel = .Scale(.StdPar.Right.SEL2T10Node_pos);};
  AnyRefNode SEL2T10NodeL = {sRel = .Scale(.StdPar.Left.SEL2T10Node_pos);};
  AnyRefNode SEL2T11NodeR = {sRel = .Scale(.StdPar.Right.SEL2T11Node_pos);};
  AnyRefNode SEL2T11NodeL = {sRel = .Scale(.StdPar.Left.SEL2T11Node_pos);};
  AnyRefNode SEL2T12NodeR = {sRel = .Scale(.StdPar.Right.SEL2T12Node_pos);};
  AnyRefNode SEL2T12NodeL = {sRel = .Scale(.StdPar.Left.SEL2T12Node_pos);};
  AnyRefNode SEL3T11NodeR = {sRel = .Scale(.StdPar.Right.SEL3T11Node_pos);};
  AnyRefNode SEL3T11NodeL = {sRel = .Scale(.StdPar.Left.SEL3T11Node_pos);};
  AnyRefNode SEL3T12NodeR = {sRel = .Scale(.StdPar.Right.SEL3T12Node_pos);};
  AnyRefNode SEL3T12NodeL = {sRel = .Scale(.StdPar.Left.SEL3T12Node_pos);};

};
