  AnySeg PelvisSeg = {

//    AnyDrawRefFrame drw={ScaleXYZ={0.1,0.1,0.1};};

   // r0=.SacrumSeg.SacrumPelvisJntNode.sRel*.SacrumSeg.Axes0'+.SacrumSeg.r0-L5PelvisJntNode.sRel*Axes0';

    AnyFunTransform3D &Scale =..Scaling.GeometricalScaling.Pelvis.ScaleFunction;

    AnyVar MassS = ..Scaling.MassScaling.Pelvis.MassScale;

    // This segment includes Sacrum, and 2 times os coxae

   //AnyVar MassStandard = 0.142*..BodyParRef.BodyMass - 1.65; //Winter, Taken from SimpleSpineModel
    AnyVar MassStandard = ..StandardParameters.Pelvis.Mass;

    Mass = MassS*MassStandard;
    Jii = {0.0221,0.01,0.0221}; //Taken from SimpleSpineModel

    sCoM = Scale({0.038, -0.050, 0.000000});
      JaboutCoMOnOff = On;
      AnyRefNode ScalingNode ={};


      AnyRefNode GroundPelvisJntNode = {sRel = .Scale({0.0,0.0,0.0});};
      AnyRefNode L5PelvisJntNode = {sRel = .Scale({0.043,-0.005,0.0});};

      AnyVar PelvisWidthStandard = ..StandardParameters.Pelvis.Width;

      AnyRefNode HipJointRight = {

        AnyVec3 Tt = {0.000000, -0.115000, 0.096000}; // The values are set to constant values to make it possible to move model around!

        AnyRefNode GluteusMaximus1ViaNode11 = {
          sRel = ..Scale( -.Tt+{-0.050, -0.075, 0.12});
        };
        sRel = .Scale({0.03, -0.10, 0.08});};

      AnyRefNode HipJointLeft = {sRel = .Scale({0.03, -0.10, -0.08});};


        AnyRefNode HipJointRightTD = {
         //This rotaion is needed to fit the data with the pelvis bone
         ARel=RotMat(-24*pi/180,z);
        AnyVec3 sRel0 = {0.035, -0.115, 0.088};
		sRel = .Scale(sRel0);
       };


AnyRefNode HipJointLeftTD = {
         //This rotaion is needed to fit the data with the pelvis bone
         ARel=RotMat(-24*pi/180,z);
        AnyVec3 sRel0 = {0.035, -0.115, -0.088};
        sRel = .Scale(sRel0);

      };


    AnyRefNode HipJointsCenter = {
      sRel = .Scale({0.03, -0.10, 0});
    };

    AnyRefNode HipJointsCenterTD = {
      sRel = .Scale({0.035, -0.115, 0.0});
    };


    //AnyDrawSeg DrwSeg = {};
    AnyRefNode PelvisSacrumJntNode = {
      sRel = .Scale({0.027,-0.030,0.000});
      //AnyDrawNode DrwNode = {
      //ScaleXYZ = {0.005,0.005,0.005};
      //RGB = {1,1,0};
      AnyFunTransform3D &Scale =.Scale;
    };
    AnyDrawSurf DrwSTL = {
      FileName = "BonesSpine\PelvisWOS";
       Opacity =         Main.DrawSettings.BonesOpacity.Pelvis;
      //FileName = ".\BonesSpine\SacrumSeg";
      RGB = ...ColorRef.Segments;

      AnyFunTransform3D &Scale =.Scale;
    };

     AnyRefNode RightAsisMarker = {
         sRel=.Scale({0.108750, -0.058906, 0.117813});

//      AnyDrawNode  drw={
//        ScaleXYZ={1,1,1}*Main.DrawSettings.Marker.Radius;
//        RGB=Main.DrawSettings.Marker.Color;
//      };
    };

     AnyRefNode LeftAsisMarker = {
         sRel=.Scale({0.108750, -0.058906, -0.117813});
//
//      AnyDrawNode  drw={
//        ScaleXYZ={1,1,1}*Main.DrawSettings.Marker.Radius;
//        RGB=Main.DrawSettings.Marker.Color;
//      };
    };

  }; // End of PelvisSeg
