/// Definition of the cervical spine
AnyFolder SegmentsCervicalSpine = {


  AnySeg C1Seg = {

	AnyFolder &Data = ..ModelParameters.C1Seg;

    r0= .C2Seg.C2C1JntNode.sRel*.C2Seg.Axes0'+.C2Seg.r0-C2C1JntNode.sRel*Axes0';

    AnyVar MassS = ..Scaling.MassScaling.Cervical.MassScale;
    AnyVar MassStandard = ..StandardParameters.CervicalSpine.Mass*0.135;

    Mass = MassS*MassStandard;
    Jii = Data.Jii;

    AnyFunTransform3D &Scale =..ScalingTrunk.C1Seg.ScaleFunction;

    sCoM = Scale(Data.sCoM_pos);
    JaboutCoMOnOff = On;

    AnyRefNode C2C1JntNode = {sRel = .Scale(.Data.C2C1JntNode_pos);};
    AnyRefNode C1C0JntNode = {sRel = .Scale(.Data.C1C0JntNode_pos);AnyDrawNodes DrwNode = {ScaleXYZ = 0.003*{1,1,1};RGB = {1, 0, 0};};};

    //Longus colli nodes
    AnyRefNode LongusColliT1C1NodeR = {sRel = .Scale(.Data.LongusColliT1C1NodeR_pos);};
    AnyRefNode LongusColliT1C1NodeL = {sRel = .Scale(.Data.LongusColliT1C1NodeL_pos);};

    //Splenius cervicis nodes
    AnyRefNode SpleniusCervicisT3C1NodeR = {sRel = .Scale(.Data.SpleniusCervicisT3C1NodeR_pos);};
    AnyRefNode SpleniusCervicisT3C1NodeL = {sRel = .Scale(.Data.SpleniusCervicisT3C1NodeL_pos);};

    AnyDrawSurf DrwSTL = {
      FileName = ...STL.FilenameC1Seg;
      RGB = ...ColorRef.Segments;
      Opacity = Main.DrawSettings.BonesOpacity.C1;
      AnyFunTransform3D &Scale =.Scale;
    };
    AnyRefNode Right ={};
    AnyRefNode Left ={};

  };

  AnySeg C2Seg = {

    AnyFolder &Data = ..ModelParameters.C2Seg;

    r0= .C3Seg.C3C2JntNode.sRel*.C3Seg.Axes0'+.C3Seg.r0-C3C2JntNode.sRel*Axes0';

    AnyFunTransform3D &Scale =..ScalingTrunk.C2Seg.ScaleFunction;

    AnyVar MassS = ..Scaling.MassScaling.Cervical.MassScale;

    AnyVar MassStandard = ..StandardParameters.CervicalSpine.Mass*0.153;

    Mass = MassS*MassStandard;

    Jii = Data.Jii;
    sCoM = Scale(Data.sCoM_pos);

    JaboutCoMOnOff = On;

    AnyRefNode C3C2JntNode = {sRel = .Scale(.Data.C3C2JntNode_pos);};
    AnyRefNode C2C1JntNode = {sRel = .Scale(.Data.C2C1JntNode_pos);AnyDrawNodes DrwNode = {ScaleXYZ = 0.003*{1,1,1};RGB = {1, 0, 0};};};

    //Longus colli nodes
    AnyRefNode LongusColliT1C2NodeR = {sRel = .Scale(.Data.LongusColliT1C2NodeR_pos);};
    AnyRefNode LongusColliT1C2NodeL = {sRel = .Scale(.Data.LongusColliT1C2NodeL_pos);};

    //Splenius cervicis nodes
    AnyRefNode SpleniusCervicisT3C2NodeR = {sRel = .Scale(.Data.SpleniusCervicisT3C2NodeR_pos);};
    AnyRefNode SpleniusCervicisT3C2NodeL = {sRel = .Scale(.Data.SpleniusCervicisT3C2NodeL_pos);};

    //Semispinalis cervicis nodes
    AnyRefNode SemispinalisCervicisT1C2NodeR = {sRel = .Scale(.Data.SemispinalisCervicisT1C2NodeR_pos);};
    AnyRefNode SemispinalisCervicisT1C2NodeL = {sRel = .Scale(.Data.SemispinalisCervicisT1C2NodeL_pos);};

    //Longissimus cervicis nodes
    AnyRefNode LongissimusCervicisT2C2NodeR = {sRel = .Scale(.Data.LongissimusCervicisT2C2NodeR_pos);};
    AnyRefNode LongissimusCervicisT2C2NodeL = {sRel = .Scale(.Data.LongissimusCervicisT2C2NodeL_pos);};

    //Multifidus cervicis nodes
    AnyRefNode MultifidusCervicisC2NodeR = {sRel = .Scale(.Data.MultifidusCervicisC2NodeR_pos);};
    AnyRefNode MultifidusCervicisC2NodeL = {sRel = .Scale(.Data.MultifidusCervicisC2NodeL_pos);};

    AnyDrawSurf DrwSTL = {
      FileName = ...STL.FilenameC2Seg;
      RGB = ...ColorRef.Segments;
      Opacity = Main.DrawSettings.BonesOpacity.C2;
      AnyFunTransform3D &Scale =.Scale;
    };
    AnyRefNode Right ={};
    AnyRefNode Left ={};
  };


  AnySeg C3Seg = {

	AnyFolder &Data = ..ModelParameters.C3Seg;

    r0= .C4Seg.C4C3JntNode.sRel*.C4Seg.Axes0'+.C4Seg.r0-C4C3JntNode.sRel*Axes0';

    AnyVar MassS = ..Scaling.MassScaling.Cervical.MassScale;
    AnyVar MassStandard = ..StandardParameters.CervicalSpine.Mass*0.147;

	AnyFunTransform3D &Scale =..ScalingTrunk.C3Seg.ScaleFunction;

    Mass = MassS*MassStandard;

    Jii = Data.Jii;
    sCoM = Scale(Data.sCoM_pos);

    JaboutCoMOnOff = On;

    AnyRefNode C4C3JntNode = {sRel = .Scale(.Data.C4C3JntNode_pos);};
    AnyRefNode C3C2JntNode = {sRel = .Scale(.Data.C3C2JntNode_pos);AnyDrawNodes DrwNode = {ScaleXYZ = 0.003*{1,1,1};RGB = {1, 0, 0};};};

    //Longus colli nodes
    AnyRefNode LongusColliT1C3NodeR = {sRel = .Scale(.Data.LongusColliT1C3NodeR_pos);};
    AnyRefNode LongusColliT1C3NodeL = {sRel = .Scale(.Data.LongusColliT1C3NodeL_pos);};

    //Longus cappitis nodes
    AnyRefNode LongusCapitisC3C0NodeR = {sRel = .Scale(.Data.LongusCapitisC3C0NodeR_pos);};
    AnyRefNode LongusCapitisC3C0NodeL = {sRel = .Scale(.Data.LongusCapitisC3C0NodeL_pos);};

    //Scalenus medius nodes
    AnyRefNode ScalenusMediusT1C3NodeR = {sRel = .Scale(.Data.ScalenusMediusT1C3NodeR_pos);};
    AnyRefNode ScalenusMediusT1C3NodeL = {sRel = .Scale(.Data.ScalenusMediusT1C3NodeL_pos);};

    //Splenius cervicis nodes
    AnyRefNode SpleniusCervicisT3C3NodeR = {sRel = .Scale(.Data.SpleniusCervicisT3C3NodeR_pos);};
    AnyRefNode SpleniusCervicisT3C3NodeL = {sRel = .Scale(.Data.SpleniusCervicisT3C3NodeL_pos);};

    //Semispinalis cervicis nodes
    AnyRefNode SemispinalisCervicisT2C3NodeR = {sRel = .Scale(.Data.SemispinalisCervicisT2C3NodeR_pos);};
    AnyRefNode SemispinalisCervicisT2C3NodeL = {sRel = .Scale(.Data.SemispinalisCervicisT2C3NodeL_pos);};

    //Longissimus capitis nodes
    AnyRefNode LongissimusCapitisC3C0NodeR = {sRel = .Scale(.Data.LongissimusCapitisC3C0NodeR_pos);};
    AnyRefNode LongissimusCapitisC3C0NodeL = {sRel = .Scale(.Data.LongissimusCapitisC3C0NodeL_pos);};

    //Longissimus cervicis nodes
    AnyRefNode LongissimusCervicisT2C3NodeR = {sRel = .Scale(.Data.LongissimusCervicisT2C3NodeR_pos);};
    AnyRefNode LongissimusCervicisT2C3NodeL = {sRel = .Scale(.Data.LongissimusCervicisT2C3NodeL_pos);};

    //Multifidus cervicis nodes
    AnyRefNode MultifidusCervicisC3NodeR = {sRel = .Scale(.Data.MultifidusCervicisC3NodeR_pos);};
    AnyRefNode MultifidusCervicisC3NodeL = {sRel = .Scale(.Data.MultifidusCervicisC3NodeL_pos);};

    AnyDrawSurf DrwSTL = {
      FileName = ...STL.FilenameC3Seg;
      RGB = ...ColorRef.Segments;
      Opacity = Main.DrawSettings.BonesOpacity.C3;
      AnyFunTransform3D &Scale =.Scale;
    };
    AnyRefNode Right ={};
    AnyRefNode Left ={};
  };

  AnySeg C4Seg = {

    AnyFolder &Data = ..ModelParameters.C4Seg;

    r0= .C5Seg.C5C4JntNode.sRel*.C5Seg.Axes0'+.C5Seg.r0-C5C4JntNode.sRel*Axes0';

    AnyVar MassS = ..Scaling.MassScaling.Cervical.MassScale;
    AnyVar MassStandard = ..StandardParameters.CervicalSpine.Mass*0.141;

    Mass = MassS*MassStandard;

    AnyFunTransform3D &Scale =..ScalingTrunk.C4Seg.ScaleFunction;

    Jii = Data.Jii;
    sCoM = Scale(Data.sCoM_pos);

    JaboutCoMOnOff = On;

    AnyRefNode C5C4JntNode = {sRel = .Scale(.Data.C5C4JntNode_pos);};
    AnyRefNode C4C3JntNode = {sRel = .Scale(.Data.C4C3JntNode_pos);AnyDrawNodes DrwNode = {ScaleXYZ = 0.003*{1,1,1};RGB = {1, 0, 0};};};

    //Longus colli nodes
    AnyRefNode LongusColliT1C4NodeR = {sRel = .Scale(.Data.LongusColliT1C4NodeR_pos);};
    AnyRefNode LongusColliT1C4NodeL = {sRel = .Scale(.Data.LongusColliT1C4NodeL_pos);};

    //Longus cappitis nodes
    AnyRefNode LongusCapitisC4C0NodeR = {sRel = .Scale(.Data.LongusCapitisC4C0NodeR_pos);};
    AnyRefNode LongusCapitisC4C0NodeL = {sRel = .Scale(.Data.LongusCapitisC4C0NodeL_pos);};

    //Scalenus anterior nodes
    AnyRefNode ScalenusAnteriorT1C4NodeR = {sRel = .Scale(.Data.ScalenusAnteriorT1C4NodeR_pos);};
    AnyRefNode ScalenusAnteriorT1C4NodeL = {sRel = .Scale(.Data.ScalenusAnteriorT1C4NodeL_pos);};

    //Semispinalis capitis nodes
    AnyRefNode SemispinalisCapitisC4C0NodeR = {sRel = .Scale(.Data.SemispinalisCapitisC4C0NodeR_pos);};
    AnyRefNode SemispinalisCapitisC4C0NodeL = {sRel = .Scale(.Data.SemispinalisCapitisC4C0NodeL_pos);};

    //Semispinalis cervicis nodes
    AnyRefNode SemispinalisCervicisT3C4NodeR = {sRel = .Scale(.Data.SemispinalisCervicisT3C4NodeR_pos);};
    AnyRefNode SemispinalisCervicisT3C4NodeL = {sRel = .Scale(.Data.SemispinalisCervicisT3C4NodeL_pos);};

    //Longissimus capitis nodes
    AnyRefNode LongissimusCapitisC4C0NodeR = {sRel = .Scale(.Data.LongissimusCapitisC4C0NodeR_pos);};
    AnyRefNode LongissimusCapitisC4C0NodeL = {sRel = .Scale(.Data.LongissimusCapitisC4C0NodeL_pos);};

    //Longissimus cervicis nodes
    AnyRefNode LongissimusCervicisT2C4NodeR = {sRel = .Scale(.Data.LongissimusCervicisT2C4NodeR_pos);};
    AnyRefNode LongissimusCervicisT2C4NodeL = {sRel = .Scale(.Data.LongissimusCervicisT2C4NodeL_pos);};

    //Multifidus cervicis nodes
    AnyRefNode MultifidusCervicisC4NodeR = {sRel = .Scale(.Data.MultifidusCervicisC4NodeR_pos);};
    AnyRefNode MultifidusCervicisC4NodeL = {sRel = .Scale(.Data.MultifidusCervicisC4NodeL_pos);};

    AnyDrawSurf DrwSTL = {
      FileName = ...STL.FilenameC4Seg;
      RGB = ...ColorRef.Segments;
      Opacity = Main.DrawSettings.BonesOpacity.C4;
      AnyFunTransform3D &Scale =.Scale;
    };
    AnyRefNode Right ={};
	AnyRefNode Left ={};
  };

  AnySeg C5Seg = {

    AnyFolder &Data = ..ModelParameters.C5Seg;

    r0= .C6Seg.C6C5JntNode.sRel*.C6Seg.Axes0'+.C6Seg.r0-C6C5JntNode.sRel*Axes0';

    AnyVar MassS = ..Scaling.MassScaling.Cervical.MassScale;
    AnyVar MassStandard = ..StandardParameters.CervicalSpine.Mass*0.141;

    Mass = MassS*MassStandard;

    AnyFunTransform3D &Scale =..ScalingTrunk.C5Seg.ScaleFunction;

    Jii = Data.Jii;
    sCoM = Scale(Data.sCoM_pos);

    JaboutCoMOnOff = On;

    AnyRefNode C6C5JntNode = {sRel = .Scale(.Data.C6C5JntNode_pos);};
    AnyRefNode C5C4JntNode = {sRel = .Scale(.Data.C5C4JntNode_pos);AnyDrawNodes DrwNode = {ScaleXYZ = 0.003*{1,1,1};RGB = {1, 0, 0};};};

    //Longus colli nodes
    AnyRefNode LongusColliT1C5NodeR = {sRel = .Scale(.Data.LongusColliT1C5NodeR_pos);};
    AnyRefNode LongusColliT1C5NodeL = {sRel = .Scale(.Data.LongusColliT1C5NodeL_pos);};

    //Longus cappitis nodes
    AnyRefNode LongusCapitisC5C0NodeR = {sRel = .Scale(.Data.LongusCapitisC5C0NodeR_pos);};
    AnyRefNode LongusCapitisC5C0NodeL = {sRel = .Scale(.Data.LongusCapitisC5C0NodeL_pos);};

    //Scalenus Posterior nodes
    AnyRefNode ScalenusPosteriorT1C5NodeR = {sRel = .Scale(.Data.ScalenusPosteriorT1C5NodeR_pos);};
    AnyRefNode ScalenusPosteriorT1C5NodeL = {sRel = .Scale(.Data.ScalenusPosteriorT1C5NodeL_pos);};

    //Semispinalis capitis nodes
    AnyRefNode SemispinalisCapitisC5C0NodeR = {sRel = .Scale(.Data.SemispinalisCapitisC5C0NodeR_pos);};
    AnyRefNode SemispinalisCapitisC5C0NodeL = {sRel = .Scale(.Data.SemispinalisCapitisC5C0NodeL_pos);};

    //Semispinalis cervicis nodes
    AnyRefNode SemispinalisCervicisT4C5NodeR = {sRel = .Scale(.Data.SemispinalisCervicisT4C5NodeR_pos);};
    AnyRefNode SemispinalisCervicisT4C5NodeL = {sRel = .Scale(.Data.SemispinalisCervicisT4C5NodeL_pos);};

    //Longissimus capitis nodes
    AnyRefNode LongissimusCapitisC5C0NodeR = {sRel = .Scale(.Data.LongissimusCapitisC5C0NodeR_pos);};
    AnyRefNode LongissimusCapitisC5C0NodeL = {sRel = .Scale(.Data.LongissimusCapitisC5C0NodeL_pos);};

    //Longissimus cervicis nodes
    AnyRefNode LongissimusCervicisT2C5NodeR = {sRel = .Scale(.Data.LongissimusCervicisT2C5NodeR_pos);};
    AnyRefNode LongissimusCervicisT2C5NodeL = {sRel = .Scale(.Data.LongissimusCervicisT2C5NodeL_pos);};

    //Multifidus cervicis nodes
    AnyRefNode MultifidusCervicisC5C2NodeR = {sRel = .Scale(.Data.MultifidusCervicisC5C2NodeR_pos);};
    AnyRefNode MultifidusCervicisC5C2NodeL = {sRel = .Scale(.Data.MultifidusCervicisC5C2NodeL_pos);};

    AnyRefNode MultifidusCervicisC5NodeR = {sRel = .Scale(.Data.MultifidusCervicisC5NodeR_pos);};
    AnyRefNode MultifidusCervicisC5NodeL = {sRel = .Scale(.Data.MultifidusCervicisC5NodeL_pos);};

    AnyDrawSurf DrwSTL = {
      FileName = ...STL.FilenameC5Seg;
      RGB = ...ColorRef.Segments;
      Opacity = Main.DrawSettings.BonesOpacity.C5;
      AnyFunTransform3D &Scale =.Scale;
    };
	AnyRefNode Right ={};
	AnyRefNode Left ={};
  };

  AnySeg C6Seg = {

	AnyFolder &Data = ..ModelParameters.C6Seg;

    r0= .C7Seg.C7C6JntNode.sRel*.C7Seg.Axes0'+.C7Seg.r0-C7C6JntNode.sRel*Axes0';

    AnyVar MassS = ..Scaling.MassScaling.Cervical.MassScale;
    AnyVar MassStandard = ..StandardParameters.CervicalSpine.Mass*0.147;

    Mass = MassS*MassStandard;

    AnyFunTransform3D &Scale =..ScalingTrunk.C6Seg.ScaleFunction;

    Jii = Data.Jii;
    sCoM = Scale(Data.sCoM_pos);

    JaboutCoMOnOff = On;

    AnyRefNode C7C6JntNode = {sRel = .Scale(.Data.C7C6JntNode_pos);};
    AnyRefNode C6C5JntNode = {sRel = .Scale(.Data.C6C5JntNode_pos);AnyDrawNodes DrwNode = {ScaleXYZ = 0.003*{1,1,1};RGB = {1, 0, 0};};};

    //Longus colli nodes
    AnyRefNode LongusColliT1C6NodeR = {sRel = .Scale(.Data.LongusColliT1C6NodeR_pos);};
    AnyRefNode LongusColliT1C6NodeL = {sRel = .Scale(.Data.LongusColliT1C6NodeL_pos);};

    //Longus cappitis nodes
    AnyRefNode LongusCapitisC6C0NodeR = {sRel = .Scale(.Data.LongusCapitisC6C0NodeR_pos);};
    AnyRefNode LongusCapitisC6C0NodeL = {sRel = .Scale(.Data.LongusCapitisC6C0NodeL_pos);};

    //Semispinalis capitis nodes
    AnyRefNode SemispinalisCapitisC6C0NodeR = {sRel = .Scale(.Data.SemispinalisCapitisC6C0NodeR_pos);};
    AnyRefNode SemispinalisCapitisC6C0NodeL = {sRel = .Scale(.Data.SemispinalisCapitisC6C0NodeL_pos);};

    //Semispinalis cervicis nodes
    AnyRefNode SemispinalisCervicisT5C6NodeR = {sRel = .Scale(.Data.SemispinalisCervicisT5C6NodeR_pos);};
    AnyRefNode SemispinalisCervicisT5C6NodeL = {sRel = .Scale(.Data.SemispinalisCervicisT5C6NodeL_pos);};

    //Longissimus capitis nodes
    AnyRefNode LongissimusCapitisC6C0NodeR = {sRel = .Scale(.Data.LongissimusCapitisC6C0NodeR_pos);};
    AnyRefNode LongissimusCapitisC6C0NodeL = {sRel = .Scale(.Data.LongissimusCapitisC6C0NodeL_pos);};

    //Longissimus cervicis nodes
    AnyRefNode LongissimusCervicisT2C6NodeR = {sRel = .Scale(.Data.LongissimusCervicisT2C6NodeR_pos);};
    AnyRefNode LongissimusCervicisT2C6NodeL = {sRel = .Scale(.Data.LongissimusCervicisT2C6NodeL_pos);};

    //Multifidus cervicis nodes
    AnyRefNode MultifidusCervicisC6C2NodeR = {sRel = .Scale(.Data.MultifidusCervicisC6C2NodeR_pos);};
    AnyRefNode MultifidusCervicisC6C2NodeL = {sRel = .Scale(.Data.MultifidusCervicisC6C2NodeL_pos);};

    AnyRefNode MultifidusCervicisC6C3NodeR = {sRel = .Scale(.Data.MultifidusCervicisC6C3NodeR_pos);};
    AnyRefNode MultifidusCervicisC6C3NodeL = {sRel = .Scale(.Data.MultifidusCervicisC6C3NodeL_pos);};

    AnyRefNode MultifidusCervicisC6NodeR = {sRel = .Scale(.Data.MultifidusCervicisC6NodeR_pos);};
    AnyRefNode MultifidusCervicisC6NodeL = {sRel = .Scale(.Data.MultifidusCervicisC6NodeL_pos);};

    AnyDrawSurf DrwSTL = {
      FileName = ...STL.FilenameC6Seg;
      RGB = ...ColorRef.Segments;
      Opacity = Main.DrawSettings.BonesOpacity.C6;
      AnyFunTransform3D &Scale =.Scale;
    };
	AnyRefNode Right ={};
	AnyRefNode Left ={};
  };

  AnySeg C7Seg = {

    AnyFolder &Data = ..ModelParameters.C7Seg;

    r0= ..SegmentsThorax.ThoraxSeg.T1C7JntNode.sRel*..SegmentsThorax.ThoraxSeg.Axes0'+..SegmentsThorax.ThoraxSeg.r0-T1C7JntNode.sRel*Axes0';

    AnyVar MassS = ..Scaling.MassScaling.Cervical.MassScale;
    AnyVar MassStandard = ..StandardParameters.CervicalSpine.Mass*0.135;

    Mass = MassS*MassStandard;

    AnyFunTransform3D &Scale =..ScalingTrunk.C7Seg.ScaleFunction;

    Jii = Data.Jii;
    sCoM = Scale(Data.sCoM_pos);

    JaboutCoMOnOff = On;

    AnyRefNode T1C7JntNode = {sRel = .Scale(.Data.T1C7JntNode_pos);};
    AnyRefNode C7C6JntNode = {sRel = .Scale(.Data.C7C6JntNode_pos);AnyDrawNodes DrwNode = {ScaleXYZ = 0.003*{1,1,1};RGB = {1, 0, 0};};};

    //Splenius capitis nodes
    AnyRefNode SpleniusCapitisC7C0NodeR = {sRel = .Scale(.Data.SpleniusCapitisC7C0NodeR_pos);};
    AnyRefNode SpleniusCapitisC7C0NodeL = {sRel = .Scale(.Data.SpleniusCapitisC7C0NodeL_pos);};

    //Semispinalis capitis nodes
    AnyRefNode SemispinalisCapitisC7C0NodeR = {sRel = .Scale(.Data.SemispinalisCapitisC7C0NodeR_pos);};
    AnyRefNode SemispinalisCapitisC7C0NodeL = {sRel = .Scale(.Data.SemispinalisCapitisC7C0NodeL_pos);};

    //Semispinalis cervicis nodes
    AnyRefNode SemispinalisCervicisT6C7NodeR = {sRel = .Scale(.Data.SemispinalisCervicisT6C7NodeR_pos);};
    AnyRefNode SemispinalisCervicisT6C7NodeL = {sRel = .Scale(.Data.SemispinalisCervicisT6C7NodeL_pos);};

    //Longissimus capitis nodes
    AnyRefNode LongissimusCapitisC7C0NodeR = {sRel = .Scale(.Data.LongissimusCapitisC7C0NodeR_pos);};
    AnyRefNode LongissimusCapitisC7C0NodeL = {sRel = .Scale(.Data.LongissimusCapitisC7C0NodeL_pos);};

    //Longissimus cervicis nodes
    AnyRefNode LongissimusCervicisT2C7NodeR = {sRel = .Scale(.Data.LongissimusCervicisT2C7NodeR_pos);};
    AnyRefNode LongissimusCervicisT2C7NodeL = {sRel = .Scale(.Data.LongissimusCervicisT2C7NodeL_pos);};

    //Multifidus cervicis nodes
    AnyRefNode MultifidusCervicisC7C3NodeR = {sRel = .Scale(.Data.MultifidusCervicisC7C3NodeR_pos);};
    AnyRefNode MultifidusCervicisC7C3NodeL = {sRel = .Scale(.Data.MultifidusCervicisC7C3NodeL_pos);};

    AnyRefNode MultifidusCervicisC7C4NodeR = {sRel = .Scale(.Data.MultifidusCervicisC7C4NodeR_pos);};
    AnyRefNode MultifidusCervicisC7C4NodeL = {sRel = .Scale(.Data.MultifidusCervicisC7C4NodeL_pos);};

    AnyRefNode MultifidusCervicisC7NodeR = {sRel = .Scale(.Data.MultifidusCervicisC7NodeR_pos);};
    AnyRefNode MultifidusCervicisC7NodeL = {sRel = .Scale(.Data.MultifidusCervicisC7NodeL_pos);};

    AnyDrawSurf DrwSTL = {
      FileName = ...STL.FilenameC7Seg;
      RGB = ...ColorRef.Segments;
      Opacity = Main.DrawSettings.BonesOpacity.C7;
      AnyFunTransform3D &Scale =.Scale;
    };
	AnyRefNode Right ={};
	AnyRefNode Left ={};
  };


};
