SelectedOutput.Trunk.Muscles = {

    #if BM_TRUNK_MUSCLES == OFF
      AnySearchFun MuscleList = {
        Search = "....Trunk.JointMuscles.*.*.*.Object.Muscle.*.Activity";
      };
    #else
      AnySearchFun MuscleList = {
        Search = {"....Trunk.Muscles.*.*.*.Activity", "....Trunk.Muscles.*.*.Activity"};
      };

    #endif

    AnyFloat MuscleActivities = MuscleList();
    AnyVar Envelope = max(MuscleActivities);
}; //End Muscles
