#include "LumbarNodes.any"

#include "ThoracicNodes.any"

#include "CervicalNodes.any"


AnyVar BodyMass = 75;  ///< This is a body mass that the trunk dataset is based on

AnyVar PelvisWidth = 0.1791738;
AnyVar PelvisDepth = 0.1509133;
AnyVar PelvisHeight = 0.1188;
AnyVar PelvisMass = 0.142*BodyMass; //Pelvis mass proportion according to Winter et al.

AnyVar TrunkHeight = vnorm(ThoraxSeg.C1HatNode-L5Seg.L5SacrumJnt);///< Height computed from the L5SacrumJnt to C1 node
AnyVar TrunkWidth = 0.3881839;///< Shoulder width
AnyVar TrunkMass = 0.1894*BodyMass; ///< C7-T1 to T12-L1 (modified from 0.216 winter to separate scapula)

AnyVar HeadMass  = 0.081*BodyMass; ///<The mass of the body parts from C7-T1 to ear canal
AnyVar HeadHeight =  0.14;          ///<The height of the body parts from C7-T1 to ear canal
AnyVar HeadDepth = 0.2299;          ///<measured from ANSURFront to ANSURPos
AnyVar HeadWidth = 0.1800;          ///<measured from ANSURlLat to ANSURrLat
AnyVar NeckLength = 0.1570;         ///<measured from .SegmentsThorax.ThoraxSeg.T1C7JntNode.sRel to SegmentsThorax.ThoraxSeg.C1HatNode.sRel
                                    /// may need to take out vertical component of this,

AnyVar LumbarMass = 0.139*BodyMass; ///<Standard mass of the lumbar spine part

AnyVar CervicalSpineMass = 0.26*0.081*BodyMass; ///<Standard mass of the cervical part


AnyVar HeadWithoutNeckMass = 0.74*0.081*BodyMass; ///<Standard mass of the head without neck
AnyVar HeadWithoutNeckHeight =  0.14;
