#include "../libdef.any"

#include "../../Application/Examples/CrossTrainer/CrossTrainer.main.any"


#ifndef TEST_NAME
#define CREATE_IMAGE 1
#endif


Main =
{
  AnyBodyStudy TestStudy =
  {
    AnyFolder& Model = .Model;
    tStart = 0;
    tEnd = 1;
    nStep = 30; // Reduced number of steps for the test
    Gravity = {0, -9.81, 0};
  };


  AnyOperationSequence TestRunApplication = {
    AnyOperation& cal = Main.RunApplication.CalibrationAnal;
    AnyOperation& study = Main.TestStudy.InverseDynamics;
  };


#ifndef CREATE_IMAGE
  AnyOperation& RunTest = Main.TestRunApplication;
#else
  #include "../Cameras.any"
  AnyOperation& CameraInitPos = Main.Study.InitialConditions;
  LoadTimeCam.CameraLookAtPoint = {-0.65,0.95,0};
  LoadTimeCam.CameraFieldOfView = DesignVar(2);
  LoadTimeCam.CameraDirection  = {0,0,1};
#endif


};
