//define = [
//    {'BM_LEG_MODEL': '_LEG_MODEL_Leg_'},
//    {'BM_LEG_MODEL': '_LEG_MODEL_TLEM_'},
//]
#include "../libdef.any"

#include "../../Application/Examples/FreePosture/FreePostureFullBodyStatic.Main.any"

Main =
{
  AnyOperation& RunTest = Main.RunApplication;
};
