#include "../../Application/Examples/SpineFixationWithForceDepKinematics/SpineFixationWithForceDependentKinematics.main.any"

Main =
{
  AnyOperationSequence RunTest = {
    AnyOperation& t1 = Main.RunApplication.CalibrationAnal;
    AnyOperation& t2 = Main.Study.Kinematics;
  };
};
