#include "../libdef.any"

#include "../../Application/Validation/WilkeSpinalDiscPressure/SpinePressureStandingLiftStretchedArms/SpinePressureStandingLiftStretchedArms.main.any"

Main =
{
#ifndef CREATE_IMAGE
  AnyOperation& RunTest = Main.RunApplication;
#else
  #include "../Cameras.any"
  AnyOperation& CameraInitPos = Main.Study.InitialConditions;
  LoadTimeCam.CameraLookAtPoint = {0.1,0.9,0};
  LoadTimeCam.CameraFieldOfView = DesignVar(2);
  LoadTimeCam.CameraDirection  = {0,0,1};
#endif
};
