//define = (
//  [
//    {'BM_ARM_MUSCLES_LEFT': '_MUSCLES_NONE_'},
//    {'BM_ARM_MUSCLES_LEFT': '_MUSCLES_SIMPLE_'},
//    {'BM_ARM_MUSCLES_LEFT': '_MUSCLES_3E_HILL_'},
//  ],
//  [
//    {'BM_ARM_MUSCLES_RIGHT': '_MUSCLES_NONE_'},
//    {'BM_ARM_MUSCLES_RIGHT': '_MUSCLES_SIMPLE_'},
//    {'BM_ARM_MUSCLES_RIGHT': '_MUSCLES_3E_HILL_'},
//  ],
//  [
//    {'BM_TRUNK_MUSCLES': '_MUSCLES_NONE_'},
//    {'BM_TRUNK_MUSCLES': '_MUSCLES_SIMPLE_'},
//  ],
//  [
//    {'BM_TRUNK_NECK': 'OFF'},
//    {'BM_TRUNK_NECK': 'ON', 'BM_TRUNK_NECK_MUSCLES': '_MUSCLES_NONE_'},
//    {'BM_TRUNK_NECK': 'ON', 'BM_TRUNK_NECK_MUSCLES': '_MUSCLES_SIMPLE_'},
//    {'BM_TRUNK_NECK': 'ON', 'BM_TRUNK_NECK_MUSCLES': '_MUSCLES_SIMPLE_',
//     'BM_TRUNK_NECK_SIMPLE_MUSCLES_ONLY_ON_NECK': 'ON'},
//  ],
//)
//ignore_errors = ['BodyModel.UnhallowedCombination','Model loading skipped']
//

#path ANYBODY_PATH_OUTPUT "."
#include "libdef.any"

Main =
{
  // #include "<ANYBODY_PATH_BODY>\Documentation\BodyModel.parameters.any"
  #include "<ANYBODY_PATH_BODY>\HumanModel.any"

  AnyOperationDummy RunApplication = {};
};
