//define = (
//  [
//    {'BM_LEG_RIGHT':'OFF'},
//    {'BM_LEG_RIGHT':'_LEG_MODEL_Leg_'},
//    {'BM_LEG_RIGHT':'_LEG_MODEL_TLEM2_'},
//    {'BM_LEG_RIGHT':'_LEG_MODEL_TLEM_'},
//  ],
//  [
//    {'BM_LEG_LEFT':'OFF'},
//    {'BM_LEG_LEFT':'_LEG_MODEL_Leg_'},
//    {'BM_LEG_LEFT':'_LEG_MODEL_TLEM2_'},
//    {'BM_LEG_LEFT':'_LEG_MODEL_TLEM_'},
//  ],
//  [
//    {'BM_TRUNK_NECK': 'OFF'},
//    {'BM_TRUNK_NECK': 'ON'},
//  ],
//)
//ignore_errors = ['BodyModel.UnhallowedCombination','Model loading skipped']
//
#path ANYBODY_PATH_OUTPUT "."
#include "libdef.any"


Main =
{
  // #include "<ANYBODY_PATH_BODY>\Documentation\BodyModel.parameters.any"
  #include "<ANYBODY_PATH_BODY>\HumanModel.any"

  AnyOperationDummy RunApplication = {};
};
