//define = (
//  [
//    {'BM_ARM_LEFT': 'ON'},
//    {'BM_ARM_LEFT': 'OFF'},
//  ],
//  [
//    {'BM_ARM_RIGHT': 'ON'},
//    {'BM_ARM_RIGHT': 'OFF'},
//  ],
//  [
//    {'BM_HAND_MODEL': '_HAND_MODEL_OFF_'},
//    {'BM_HAND_MODEL': '_HAND_MODEL_ANYBODY_'},
//    {'BM_HAND_MODEL': '_HAND_MODEL_RUHM_'},
//  ],
//  [
//    {'BM_ARM_SHOULDER_RHYTHM': 'OFF'},
//    {'BM_ARM_SHOULDER_RHYTHM': 'ON'},
//  ],
//)
//ignore_errors = ['BodyModel.UnhallowedCombination','Model loading skipped']
//
#include "libdef.any"

#ifndef TEST_NAME
  #define BM_ARM_LEFT 0
  #define BM_ARM_RIGHT 1
  #define BM_HAND_MODEL _HAND_MODEL_RUHM_
  #define BM_ARM_SHOULDER_RHYTHM 0
#endif


Main =
{
  // #path HTML_DOC "<AMMR_PATH_DOC>/bm_config/index.html"
  #include "<ANYBODY_PATH_BODY>\HumanModel.any"

  AnyOperationDummy RunApplication = {};
};
