//define = [
//    {'BM_LEG_LEFT': '_LEG_MODEL_TLEM2_',
//     'BM_LEG_RIGHT': '_LEG_MODEL_TLEM2_'},
//    {'BM_LEG_LEFT': '_LEG_MODEL_TLEM_',
//     'BM_LEG_RIGHT': '_LEG_MODEL_TLEM_'},
//]
#define ANYBODY_PATH_OUTPUT "."


#include "libdef.any"

// ----------------------------------------------------------
// Model configuration:
// For more info on body model configuration options please load the model and double click on:
// #include "<ANYBODY_PATH_BODY>\Documentation\BodyModel.parameters.any"
// ----------------------------------------------------------

#define BM_ARM_RIGHT OFF
#define BM_ARM_LEFT OFF

#ifndef TEST_NAME
  #define BM_LEG_LEFT 2
  #define BM_LEG_RIGHT 2

#endif


// Use interpolation drivers to define motion
#define DriverSelection "FreePostureMove"

// actual model
#include "DynamicTest/FreePostureFullBodyStatic.Main.any"
Main = {


  Main.Study ={

    AnyInt test1= assert(ltfun(Main.Study.SymmetryCheck.Leg.Muscle.Comparison.MaxFtDif,1.5),
    "Leg model symmetry");


  };


  AnyOperation& RunTest = Main.RunApplication;
};
