#include "libdef.any"

Main =
{

   DEFAULT_PARAMETER_FOLDER Settings(
       NPARAM = 3,
       PARAM_1 = TrialNumber,
       PARAM_2 = Rotation, PARAM_2_TYPE = AnyMat33,
       PARAM_3 = Name, PARAM_3_TYPE = AnyString
   ) = {
       Default.TrialNumber = 2;
       Default.Rotation = RotMat(pi/2,y);
       Default.Name = "Subject2";
   };


   // Parameters can now be overridden
   Settings.Rotation = RotMat(pi,y);
   Settings.Name = "Subject2_test";


   AnyFolder Test_MESHGRID = {
      AnyVector x_ = {0.0,1,2,3};
      AnyVector y_ = {10.0, 20.0, 30.0};
      AnyVector z_ = {100.0, 200.0};

      AnyFloat meshgrid = MESHGRID(x_,y_,z_);
      // Note the dimension is supposed to flip x and y in dimensions. See indexing option for meshgrid in the
      // numpy documentation.
      AnyInt test_meshgrid_dim = expect(eqfun(SizesOf(meshgrid), {3,3,4,2}));

      AnyInt test_xx = expect(eqfun(flatten(meshgrid[0]), {0, 0, 1, 1, 2, 2, 3, 3, 0, 0, 1, 1, 2, 2, 3, 3, 0, 0, 1, 1, 2, 2, 3, 3} ));
      AnyInt test_yy = expect(eqfun(flatten(meshgrid[1]), {10, 10, 10, 10, 10, 10, 10, 10, 20, 20, 20, 20, 20, 20, 20, 20, 30, 30, 30, 30, 30, 30, 30, 30} ));
      AnyInt test_zz = expect(eqfun(flatten(meshgrid[2]), {100, 200, 100, 200, 100, 200, 100, 200, 100, 200, 100, 200, 100, 200, 100, 200, 100, 200, 100, 200, 100, 200, 100, 200} ));

      AnyMatrix meshtripels = MESHTRIPLES(x_,y_,z_);
      AnyInt test_meshtriples_dim = expect(eqfun(SizesOf(meshtripels), {24,3}));


 };


};
