      AnyKinLinear Lin={
        Ref=0;
        AnyRefFrame &ref1=.ref1;
        AnyRefFrame &ref2=.ref2;
      };

      AnyKinRotational Rot={
        AnyRefFrame &ref1=.ref1;
        AnyRefFrame &ref2=.ref2;
        Type=RotAxesAngles;
      };


      AnyKinMeasureOrg lx={    AnyKinLinear &ref=.Lin;MeasureOrganizer ={0};   };
      AnyKinMeasureOrg ly={    AnyKinLinear &ref=.Lin;MeasureOrganizer ={1};   };
      AnyKinMeasureOrg lz={    AnyKinLinear &ref=.Lin;MeasureOrganizer ={2};   };
      AnyKinMeasureOrg rx={    AnyKinRotational &ref=.Rot;MeasureOrganizer ={0};   };
      AnyKinMeasureOrg ry={    AnyKinRotational &ref=.Rot;MeasureOrganizer ={1};   };
      AnyKinMeasureOrg rz={    AnyKinRotational &ref=.Rot;MeasureOrganizer ={2};   };

      AnyRecruitedActuator FxPos = {Type = NonNegative; AnyKinMeasure& ref1=.lx; Strength=.MusMdl.F0; SET_DEFAULT_ACTUATOR_VOLUME;   };
      AnyRecruitedActuator FyPos = {Type = NonNegative; AnyKinMeasure& ref1=.ly; Strength=.MusMdl.F0; SET_DEFAULT_ACTUATOR_VOLUME;   };
      AnyRecruitedActuator FzPos = {Type = NonNegative; AnyKinMeasure& ref1=.lz; Strength=.MusMdl.F0; SET_DEFAULT_ACTUATOR_VOLUME;   };
      AnyRecruitedActuator FxNeg = {Type = NonPositive; AnyKinMeasure& ref1=.lx; Strength=.MusMdl.F0; SET_DEFAULT_ACTUATOR_VOLUME;   };
      AnyRecruitedActuator FyNeg = {Type = NonPositive; AnyKinMeasure& ref1=.ly; Strength=.MusMdl.F0; SET_DEFAULT_ACTUATOR_VOLUME;   };
      AnyRecruitedActuator FzNeg = {Type = NonPositive; AnyKinMeasure& ref1=.lz; Strength=.MusMdl.F0; SET_DEFAULT_ACTUATOR_VOLUME;   };

      AnyRecruitedActuator MxPos = {Type = NonNegative; AnyKinMeasure& ref1=.rx; Strength=.MusMdl.F0;   SET_DEFAULT_ACTUATOR_VOLUME;   };
      AnyRecruitedActuator MyPos = {Type = NonNegative; AnyKinMeasure& ref1=.ry; Strength=.MusMdl.F0;   SET_DEFAULT_ACTUATOR_VOLUME;   };
      AnyRecruitedActuator MzPos = {Type = NonNegative; AnyKinMeasure& ref1=.rz; Strength=.MusMdl.F0;   SET_DEFAULT_ACTUATOR_VOLUME;   };
      AnyRecruitedActuator MxNeg = {Type = NonPositive; AnyKinMeasure& ref1=.rx; Strength=.MusMdl.F0;   SET_DEFAULT_ACTUATOR_VOLUME;   };
      AnyRecruitedActuator MyNeg = {Type = NonPositive; AnyKinMeasure& ref1=.ry; Strength=.MusMdl.F0;   SET_DEFAULT_ACTUATOR_VOLUME;   };
      AnyRecruitedActuator MzNeg = {Type = NonPositive; AnyKinMeasure& ref1=.rz; Strength=.MusMdl.F0;   SET_DEFAULT_ACTUATOR_VOLUME;   };
