AnyGUIPlugin ANSURPlugin = {
   PluginFile = "ANSUR_Plugin-1.1.1-py3.7-win-amd64.egg";
   ToolTip = "Change Model Scaling";
   Console = Off;
   Interactive = Off;
   DisplayName =  "ANSUR Configuration";
};
